# This file adds collision model into the actuator and add a env. Meanwhile constrains catheter to 2D.
# now Catheter contains two sections, one is stiff and the other is softer. The parameters of Catheter
# use ETHz's parameters which is not appropriate since they used meter as their unit. I will change to unit
# in version 11
# Author: JunAng Wang
# Contact: wangjunang94@gmail.com
from stlib3.scene import MainHeader
from plugin_list import pluginList, display
import numpy as np
def createScene(rootNode):

    # Header
    rootNode.addObject('FreeMotionAnimationLoop')
    rootNode.addObject('DefaultVisualManagerLoop')
    rootNode.addObject('LCPConstraintSolver',mu=0.04,tolerance=1e-6,maxIt=10000,build_lcp=False)
    rootNode.addObject('CollisionPipeline',draw=0,depth=6,verbose='1')
    rootNode.addObject('ParallelBruteForceBroadPhase',name='N2')
    rootNode.addObject('ParallelBVHNarrowPhase')
    rootNode.addObject('LocalMinDistance',contactDistance=0.002,alarmDistance=0.003,name='localmindistance',angleCone=0.02)
    rootNode.addObject('CollisionResponse',name='Response',response='FrictionContactConstraint')
    # rootNode.addObject('DefaultAnimationLoop')
    # rootNode.addObject('DefaultVisualManagerLoop')

    # setting VisualStyle, pluginList, and 3D frame coordinate
    rootNode.addObject('VisualStyle', displayFlags=display)
    rootNode.addObject('RequiredPlugin', pluginName=pluginList)
    rootNode.addObject('OglSceneFrame',style='Arrows', alignment='TopRight')
    rootNode.addObject('InteractiveCamera', name='Camera', position= [50,200,0], lookAt=[50,0,0])
    # rootNode.Camera.position.value = [50,200,0]

    rootNode.gravity = [0.0, 0.0, 0.0] # m/s^2
    radius = 0.00133/2 #m
    inner_radius = 0.0008
    StraightLength_stiff = 0.5 #m
    StraightLength_soft = 0.034 #m
    massDensity = 1550 #kg/m^3
    youngModulus_stiff = 170e6#N/m^2 = 170e6Pa (stiff)
    youngModulus_soft = 21e6
    poissonRatio = 0.3
    nbsection_soft = 3
    nbsection_stiff = 30


    #---------------------------------------------------------------------------
    # setting catheter topology mesh and wireRestShape
    GuideCatheter = rootNode.addChild('GuideCatheter')
    # create straight Section, 60 sections, if want to import from external files using RodMeshSection
    GuideCatheter.addObject('RodStraightSection', name ='StraightSection_stiff',
                         youngModulus= youngModulus_stiff, poissonRatio= poissonRatio, radius = radius, innerRadius= inner_radius, massDensity=massDensity, nbEdgesCollis = nbsection_stiff, nbEdgesVisu = 160, length = StraightLength_stiff)
    GuideCatheter.addObject('RodSpireSection', name ='StraightSection_soft',
                         youngModulus= youngModulus_soft, poissonRatio= poissonRatio, radius = radius, innerRadius =inner_radius, massDensity=massDensity, nbEdgesCollis = nbsection_soft, nbEdgesVisu = 40, length = StraightLength_soft, spireDiameter=250, spireHeight=0)


    GuideCatheter.addObject('WireRestShape', name='GC_RestShape',
                                 printLog=True, template='Rigid3d', wireMaterials = '@StraightSection_stiff @StraightSection_soft')
    GuideCatheter.addObject('EdgeSetTopologyContainer', name='meshLinesBeam')
    GuideCatheter.addObject('EdgeSetTopologyModifier', name='Modifier')
    GuideCatheter.addObject('EdgeSetGeometryAlgorithms', name='GeomAlgo', template='Rigid3d')
    GuideCatheter.addObject('MechanicalObject', name='dofTopo2', template='Rigid3d')


    #-----------------------------------------------------------------------
    # mechanical model of Catheter
    BeamModel = rootNode.addChild('BeamModel')

    BeamModel.addObject('EulerImplicitSolver', rayleighStiffness=0.2, printLog=False, rayleighMass=0)
    BeamModel.addObject('BTDLinearSolver', verbose=False)
    BeamModel.addObject('RegularGridTopology', name='MeshLines', drawEdges=False,
                                    nx=nbsection_soft+nbsection_stiff+1, ny=1, nz=1,
                                    xmax=0, xmin=0.0, ymin=0, ymax=0, zmax=0, zmin=0,
                                    p0=[0,0,0])
    DOFs = BeamModel.addObject('MechanicalObject', showIndices=False, name='Instrument_DOFs', template='Rigid3d')
    # FEM method (BeamInterpolation)
    # plug the catheter RestShape into WireBeamInterpolation
    BeamModel.addObject('WireBeamInterpolation', name='BeamInterpolation', WireRestShape='@../GuideCatheter/GC_RestShape', radius=radius, printLog=False)
    # compute internal forces
    # computeMass if false, only compute the stiff elastic model
    # massDensity: Density of the mass
    # shearStressComputation: if false, suppress the shear stress in the computation
    # reinforceLength: a separation computation for the error in elongation is performed
    BeamModel.addObject('AdaptiveBeamForceFieldAndMass', name='BeamForceField', massDensity=massDensity, interpolation='@BeamInterpolation', computeMass=True, reinforceLength= False, shearStressComputation= True)

    #Deployment Controller
    BeamModel.addObject('InterventionalRadiologyController', name='DeployController', template='Rigid3d', instruments='BeamInterpolation',
                                    startingPos=[0, 0, 0, 0, 0, 0, 1], xtip=[0, 0, 0], printLog=False,
                                    rotationInstrument=[0, 0, 0], step=0.0007, speed=1e-12,
                                    listening=True, controlledInstrument=0, threshold = 5e-9)
    BeamModel.addObject('LinearSolverConstraintCorrection', wire_optimization=True)

    BeamModel.addObject('FixedConstraint', indices=0, name='FixedConstraint')
    # Add constraint box
    # box = [0,0,-50,120,6,70]
    # BeamModel.addObject('BoxROI',name='BoxROI',box = box, drawBoxes=True, doUpdate=False)
    BeamModel.addObject('RestShapeSpringsForceField', name="RestSPForceField", points='@DeployController.indexFirstNode', angularStiffness=1e8, stiffness=1e8)
    BeamModel.addObject('PartialFixedConstraint', indices = np.arange(nbsection_stiff + nbsection_soft), fixedDirections = [0,0,1,0,0,0])

    #--------------------------------------------------------------------
    # Visual model: using WireRestShape mesh
    VisualCatheter = BeamModel.addChild('VisualCatheter')
    VisualCatheter.addObject('MechanicalObject', name= 'visu_DOFs',template='Vec3d')

    VisualCatheter.addObject('QuadSetTopologyContainer', name = "visu_container")
    VisualCatheter.addObject('QuadSetTopologyModifier')
    VisualCatheter.addObject('QuadSetGeometryAlgorithms')
    # Mapping WireRestShape mesh to topology container
    VisualCatheter.addObject('Edge2QuadTopologicalMapping', nbPointsOnEachCircle=10,
                             radius=radius, input='@../../GuideCatheter/meshLinesBeam', output='@visu_container')
    # Mapping mesh to Beam Mechanics
    VisualCatheter.addObject('AdaptiveBeamMapping', input="@../Instrument_DOFs", output="@visu_DOFs", interpolation='@../BeamInterpolation')

    # Visual beam by OglModel
    VisuOgl = VisualCatheter.addChild('VisuOgl')
    VisuOgl.addObject("OglModel", name="visual", color=[0.5,1,0.5], quads="@../visu_container.quads")
    VisuOgl.addObject('IdentityMapping', input="@../visu_DOFs",output='@visual')

    #-----------------------------------------------------------------------
    # Collision model
    CollisionCatheter = BeamModel.addChild('CollisionCatheter')
    CollisionCatheter.addObject('MechanicalObject', name='colli_DOFs',template='Vec3d')
    # if use 1D line mesh, one can extend to 2D surf mesh
    # if one needs 3D mesh, one has to import stl 3D files or deploys CylinderGridTopology

    # CollisionCatheter.addObject('QuadSetTopologyContainer',name = 'colli_container')
    # CollisionCatheter.addObject('QuadSetTopologyModifier')
    # CollisionCatheter.addObject('QuadSetGeometryAlgorithms',showPointIndices=False, showEdgeIndices=False, drawEdges=False)
    # CollisionCatheter.addObject('Edge2QuadTopologicalMapping',nbPointsOnEachCircle=10,
    #                             radius=radius, input='@../../GuideCatheter/meshLinesBeam',
    #                             output='@colli_container')

    # CollisionCatheter.activated = True
    CollisionCatheter.addObject('EdgeSetTopologyContainer',name='collisEdgeSet')
    CollisionCatheter.addObject('EdgeSetTopologyModifier',name='colliseEdgeModifier')

    # CylinderGridTopology, nz is the longitudinal direction discretization
    # CollisionCatheter.addObject('CylinderGridTopology', name ='Cylinder_container', axis= [1,0,0], center = [0,0,0], length=length, radius=radius, nx=5, ny=5, nz=6)

    CollisionCatheter.addObject('PointCollisionModel')
    CollisionCatheter.addObject('LineCollisionModel')
    # CollisionCatheter.addObject('TriangleCollisionModel')
    # CollisionCatheter.addObject('TetrahedronCollisionModel')
    CollisionCatheter.addObject('MultiAdaptiveBeamMapping',controller='../DeployController',useCurvAbs=True, printLog=False,name='collisMap')

    #---------------------------------------------------------------------
    Env = rootNode.addChild('Env')
    Env.addObject('MeshSTLLoader', name = 'env_mesh', filename= 'flat_model_circles.stl', translation=[0, 0, 0.0], rotation= [0.0, 0.0, 0.0],triangulate=True, scale = 0.001)
    # Env.addObject('MeshSTLLoader', name = 'env_mesh', filename= 'Neurovascular_3D.stl', translation=[0, 0, -5.0], rotation= [0.0, 0.0, -90.0],triangulate=True,)
    Env.addObject('MeshTopology', position = '@env_mesh.position', triangles= '@env_mesh.triangles', drawTriangles=False)
    Env.addObject('MechanicalObject', name = 'env_DOFs')

    Env.addObject('PointCollisionModel', moving=False, simulated = False)
    Env.addObject('TriangleCollisionModel', moving=False, simulated = False)
    Env.addObject('LineCollisionModel', moving= False, simulated = False)

    return rootNode
